"""Stage-C V2.4 coupled LinearSolverConstraintCorrection scene."""
from __future__ import annotations
import json,os
from pathlib import Path
import numpy as np
import Sofa
def cfg():return json.loads(Path(os.environ['SOFA_STAGE_C_V24_CONFIG']).read_text())
def fixture(root,w):
 y,x0,x1,z=map(float,(w['plane_y_m'],w['x_min_m'],w['x_max_m'],w['z_half_extent_m']));n=root.addChild('ContactWall');top=n.addObject('MeshTopology',name='topology',position=[[x0,y,-z],[x1,y,-z],[x1,y,z],[x0,y,z]],triangles=[[0,1,2],[0,2,3]]);n.addObject('MechanicalObject',name='dofs',position='@topology.position');return n.addObject('TriangleCollisionModel',name='triangles',moving=False,simulated=False,bothSide=True,contactDistance=0.),top
class Trace(Sofa.Core.Controller):
 def __init__(self,*a,**k):
  super().__init__(*a,**k);self.__dict__.update(k);self.records=[];self.pending=None;self.written=False;self.initial=np.asarray(self.dofs.position.value,float)[:,:3].copy();self.tail=self.initial[0].copy();self.snapshot=None
 def runtime(self):
  tris=np.asarray(self.fixture_topology.triangles.value,int).reshape(-1,3).tolist();root=self.root;return {'beam_collision_model':self.sphere.getClassName(),'beam_default_radius_m':float(self.sphere.radius.value),'beam_list_radius_m':np.asarray(self.sphere.listRadius.value,float).reshape(-1).tolist(),'beam_model_contact_distance_m':float(self.sphere.contactDistance.value),'fixture_collision_model':self.fixture.getClassName(),'fixture_model_contact_distance_m':float(self.fixture.contactDistance.value),'fixture_both_side':bool(self.fixture.bothSide.value),'fixture_triangle_indices':tris,'intersection_contact_distance_m':float(root.getObject('LocalMinDistance').contactDistance.value),'intersection_alarm_distance_m':float(root.getObject('LocalMinDistance').alarmDistance.value),'correction_class':self.correction.getClassName(),'correction_component_state':str(self.correction.componentState.value),'correction_mode':self.config['constraint_correction']['mode'],'correction_wire_optimization':bool(self.correction.wire_optimization.value),'correction_regularization_term':float(self.correction.regularizationTerm.value),'linear_solver_class':self.linear_solver.getClassName(),'ode_solver_class':self.ode_solver.getClassName(),'ode_rayleigh_stiffness':float(self.ode_solver.rayleighStiffness.value),'ode_rayleigh_mass':float(self.ode_solver.rayleighMass.value),'lcp_solver_class':self.solver.getClassName(),'lcp_mu':float(self.solver.mu.value),'lcp_tolerance':float(self.solver.tolerance.value),'lcp_max_it':int(self.solver.maxIt.value),'lcp_build_lcp':bool(self.solver.build_lcp.value),'lcp_compute_constraint_forces':bool(self.solver.computeConstraintForces.value),'collision_response_class':self.collision_response.getClassName(),'collision_response':str(self.collision_response.response.value),'collision_response_params':str(self.collision_response.responseParams.value)}
 def contacts(self,serial):
  n=int(self.bridge.contactCount.value);b=np.asarray(self.bridge.beamElementIds.value).reshape(-1);f=np.asarray(self.bridge.fixtureElementIds.value).reshape(-1);ids=np.asarray(self.bridge.contactIds.value).reshape(-1);val=np.asarray(self.bridge.detectionValues.value).reshape(-1);bp=np.asarray(self.bridge.beamContactPoints.value,float).reshape(n,3);fp=np.asarray(self.bridge.fixtureContactPoints.value,float).reshape(n,3);norm=np.asarray(self.bridge.beamOutwardNormals.value,float).reshape(n,3)
  if any(x.size!=n for x in (b,f,ids,val)):raise RuntimeError('native bridge contact-array mismatch')
  return [{'source_frame_serial':int(serial),'contact_id':int(ids[i]),'beam_element_id':int(b[i]),'fixture_element_id':int(f[i]),'beam_contact_point_m':bp[i].tolist(),'fixture_contact_point_m':fp[i].tolist(),'beam_outward_normal':norm[i].tolist(),'detection_value_m':float(val[i])} for i in range(n)]
 def onAnimateBeginEvent(self,e):
  if self.snapshot is None:self.snapshot=self.runtime()
  t=float(self.root.time.value);z=t<float(self.config['simulation']['zero_load_end_ms'])/1000;force=[0.,0.,0.] if z else [0.,-float(self.config['simulation']['normal_load_n']),0.];self.force.forces.value=np.asarray([[*force,0,0,0]],float);ind=np.asarray(self.force.indices.value,int).reshape(-1);data=np.asarray(self.force.forces.value,float).reshape(-1,6);self.pending={'step':len(self.records),'step_start_time_s':t,'scheduled_force_n':force,'force_field_indices_begin':ind.tolist(),'force_field_force_data_begin_n':data.tolist(),'actual_applied_force_n':data[0,:3].tolist(),'zero_load_phase':bool(z),'measurement_active':bool(t>=float(self.config['simulation']['measurement_start_ms'])/1000),'command_active':bool(not z)}
 def onAnimateEndEvent(self,e):
  if self.pending is None:raise RuntimeError('unpaired animation event')
  p=np.asarray(self.dofs.position.value,float);q=np.asarray(self.solver.constraintForces.value,float).reshape(-1);serial=int(self.bridge.frameSerial.value);cs=self.contacts(serial);ind=np.asarray(self.force.indices.value,int).reshape(-1);data=np.asarray(self.force.forces.value,float).reshape(-1,6);self.records.append({**self.pending,'step_end_time_s':float(self.root.time.value),'force_field_indices_end':ind.tolist(),'force_field_force_data_end_n':data.tolist(),'bridge_ready':bool(self.bridge.ready.value),'bridge_frame_serial':serial,'native_contact_source_serial':serial,'native_contact_count':len(cs),'native_contacts':cs,'constraint_vector_size':int(q.size),'constraint_vector':q.tolist(),'reaction_force_proxy':float(np.linalg.norm(q)) if q.size else 0.,'tail_translation_displacement_m':float(np.linalg.norm(p[0,:3]-self.tail)),'beam_node_positions_m':p[:,:3].tolist(),'max_node_displacement_m':float(np.max(np.linalg.norm(p[:,:3]-self.initial,axis=1)))});self.pending=None
  if len(self.records)>=self.steps:self.write()
 def write(self):
  if not self.written:Path(os.environ['SOFA_STAGE_C_V24_TRACE']).write_text(json.dumps({'metadata':{'mode':'coupled_constraint_correction_c1','collision_snapshot':self.snapshot,'runtime_snapshot':self.snapshot,'material_snapshot':{'default_young_modulus_pa':np.asarray(self.interpolation.defaultYoungModulus.value,float).reshape(-1).tolist(),'default_poisson_ratio':np.asarray(self.interpolation.defaultPoissonRatio.value,float).reshape(-1).tolist(),'mass_density_kg_m3':np.asarray(self.force_field.massDensity.value,float).reshape(-1).tolist()}},'records':self.records},indent=2)+'\n');self.written=True
 def onSimulationEndedEvent(self,e):self.write()
def createScene(root):
 c=cfg();b,s=c['beam'],c['simulation'];n=int(b['nodes']);L,r=float(b['length_m']),float(b['radius_m']);root.gravity=[0.,0.,0.];root.dt=float(s['dt_s']);root.addObject('RequiredPlugin',pluginName='BeamAdapter Sofa.Component.AnimationLoop Sofa.Component.Collision.Detection.Algorithm Sofa.Component.Collision.Detection.Intersection Sofa.Component.Collision.Geometry Sofa.Component.Collision.Response.Contact Sofa.Component.Constraint.Lagrangian.Correction Sofa.Component.Constraint.Lagrangian.Solver Sofa.Component.Constraint.Projective Sofa.Component.LinearSolver.Direct Sofa.Component.Mapping.Linear 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
